[c, -s, 0, 0; s, c, 0, 0; 0, 0, 1, 0; 0, 0, 0, 1]*[a1, b1, 0, 0; b1, a2, b2, 0; 0, b2, a3, b3; 0, 0, b3, a4]*[c, s, 0, 0; -s, c, 0, 0; 0, 0, 1, 0; 0, 0, 0, 1] simplify → [
    a1*c^2 - 2*b1*c*s + a2*s^2, b1*c^2 - b1*s^2 + a1*c*s - a2*c*s, -b2*s, 0;
    b1*c^2 - b1*s^2 + a1*c*s - a2*c*s, a2*c^2 + 2*b1*c*s + a1*s^2, b2*c, 0;
    -b2*s, b2*c, a3, b3;
    0, 0, b3, a4
]
[cos0, -sin0, 0, 0; sin0, cos0, 0, 0; 0, 0, 1, 0; 0, 0, 0, 1]*[a1, b1, 0, 0; b1, a2, b2, 0; 0, b2, a3, b3; 0, 0, b3, a4]*[cos0, sin0, 0, 0; -sin0, cos0, 0, 0; 0, 0, 1, 0; 0, 0, 0, 1]
[1, 0, 0, 0, 0; 0, cos1, -sin1, 0, 0; 0, sin1, cos1, 0, 0; 0, 0, 0, 1, 0; 0, 0, 0, 0, 1]*[a1, b1, P, 0, 0; b1, a2, b2, 0, 0; P, b2, a3, b3, 0; 0, 0, b3, a4, b4; 0, 0, 0, b4, a5]*[1, 0, 0, 0, 0; 0, cos1, sin1, 0, 0; 0, -sin1, cos1, 0, 0; 0, 0, 0, 1, 0; 0, 0, 0, 0, 1] simplify → [
    a1, b1*cos1 - P*sin1, P*cos1 + b1*sin1, 0, 0;
    b1*cos1 - P*sin1, a2*cos1^2 - 2*b2*cos1*sin1 + a3*sin1^2, b2*cos1^2 - b2*sin1^2 + a2*cos1*sin1 - a3*cos1*sin1, -b3*sin1, 0;
    P*cos1 + b1*sin1, b2*cos1^2 - b2*sin1^2 + a2*cos1*sin1 - a3*cos1*sin1, a3*cos1^2 + 2*b2*cos1*sin1 + a2*sin1^2, b3*cos1, 0;
    0, -b3*sin1, b3*cos1, a4, b4;
    0, 0, 0, b4, a5
]
([
    1, 0, 0, 0, 0, 0;
    0, 1, 0, 0, 0, 0;
    0, 0, c, -s, 0, 0;
    0, 0, s, c, 0, 0;
    0, 0, 0, 0, 1, 0;
    0, 0, 0, 0, 0, 1
]*[
    a[k - 2], b[k - 2], 0, 0, 0, 0;
    b[k - 2], a[k - 1], b[k - 1], P, 0, 0;
    0, b[k - 1], a[k], b[k], 0, 0;
    0, P, b[k], a[k + 1], b[k + 1], 0;
    0, 0, 0, b[k + 1], a[k + 2], b[k + 2];
    0, 0, 0, 0, b[k + 2], a[k + 3]
] + [
    U, 0, 0, 0, 0, 0;
    0, U, 0, 0, 0, 0;
    0, 0, U, 0, 0, 0;
    0, 0, 0, U, 0, 0;
    0, 0, 0, 0, U, 0;
    0, 0, 0, 0, 0, U
])*[
    1, 0, 0, 0, 0, 0;
    0, 1, 0, 0, 0, 0;
    0, 0, c, s, 0, 0;
    0, 0, -s, c, 0, 0;
    0, 0, 0, 0, 1, 0;
    0, 0, 0, 0, 0, 1
] simplify → [
    U + a[k - 2], b[k - 2], 0, 0, 0, 0;
    b[k - 2], U + a[k - 1], c*b[k - 1] - P*s, s*b[k - 1] + P*c, 0, 0;
    0, c*b[k - 1] - P*s, a[k]*c^2 - 2*b[k]*c*s + U*c + a[k + 1]*s^2, c^2*b[k] - s^2*b[k] + U*s + c*s*a[k] - c*s*a[k + 1], -s*b[k + 1], 0;
    0, s*b[k - 1] + P*c, c^2*b[k] - s^2*b[k] - U*s + c*s*a[k] - c*s*a[k + 1], a[k + 1]*c^2 + 2*b[k]*c*s + U*c + a[k]*s^2, c*b[k + 1], 0;
    0, 0, -s*b[k + 1], c*b[k + 1], U + a[k + 2], b[k + 2];
    0, 0, 0, 0, b[k + 2], U + a[k + 3]
]
[
    1, 0, 0, 0, 0, 0;
    0, 1, 0, 0, 0, 0;
    0, 0, 1, 0, 0, 0;
    0, 0, 0, 1, 0, 0;
    0, 0, 0, 0, cosN, -sinN;
    0, 0, 0, 0, sinN, cosN
]*[
    1, 1, 0, 0, 0, 0;
    1, 1, 1, 0, 0, 0;
    0, 1, 1, b3, 0, 0;
    0, 0, b3, a1, b1, P;
    0, 0, 0, b1, a2, b2;
    0, 0, 0, P, b2, a3
]*[
    1, 0, 0, 0, 0, 0;
    0, 1, 0, 0, 0, 0;
    0, 0, 1, 0, 0, 0;
    0, 0, 0, 1, 0, 0;
    0, 0, 0, 0, cosN, sinN;
    0, 0, 0, 0, -sinN, cosN
] simplify → [
    1, 1, 0, 0, 0, 0;
    1, 1, 1, 0, 0, 0;
    0, 1, 1, b3, 0, 0;
    0, 0, b3, a1, b1*cosN - P*sinN, P*cosN + b1*sinN;
    0, 0, 0, b1*cosN - P*sinN, a2*cosN^2 - 2*b2*cosN*sinN + a3*sinN^2, b2*cosN^2 - b2*sinN^2 + a2*cosN*sinN - a3*cosN*sinN;
    0, 0, 0, P*cosN + b1*sinN, b2*cosN^2 - b2*sinN^2 + a2*cosN*sinN - a3*cosN*sinN, a3*cosN^2 + 2*b2*cosN*sinN + a2*sinN^2
]
c := a1/sqrt(a1^2 + b1^2)  # error: Эта переменная не определена.
s := b1/sqrt(a1^2 + b1^2)  # error: Эта переменная не определена.
[c, -s, 0, 0; s, c, 0, 0; 0, 0, 1, 0; 0, 0, 0, 1]*[a1, b1, 0, 0; b1, a2, b2, 0; 0, b2, a3, b3; 0, 0, b3, a4]*[c, s, 0, 0; -s, c, 0, 0; 0, 0, 1, 0; 0, 0, 0, 1] simplify → [
    a1 + (a2*b1^2 - 3*a1*b1^2)/(a1^2 + b1^2), -b1 - b1*(a1*a2 - 3*a1^2)/(a1^2 + b1^2), -b1*b2/sqrt(a1^2 + b1^2), 0;
    -b1 - b1*(a1*a2 - 3*a1^2)/(a1^2 + b1^2), a1*(3*b1^2 + a1*a2)/(a1^2 + b1^2), a1*b2/sqrt(a1^2 + b1^2), 0;
    -b1*b2/sqrt(a1^2 + b1^2), a1*b2/sqrt(a1^2 + b1^2), a3, b3;
    0, 0, b3, a4
]
cos1 := b1/sqrt(P^2 + b1^2)  # error: Эта переменная не определена.
sin1 := P/sqrt(b1^2 + P^2)  # error: Эта переменная не определена.
[1, 0, 0, 0, 0; 0, cos1, -sin1, 0, 0; 0, sin1, cos1, 0, 0; 0, 0, 0, 1, 0; 0, 0, 0, 0, 1]*[a1, b1, P, 0, 0; b1, a2, b2, 0, 0; P, b2, a3, b3, 0; 0, 0, b3, a4, b4; 0, 0, 0, b4, a5]*[1, 0, 0, 0, 0; 0, cos1, sin1, 0, 0; 0, -sin1, cos1, 0, 0; 0, 0, 0, 1, 0; 0, 0, 0, 0, 1] simplify → [
    a1, -(P^2 - b1^2)/sqrt(P^2 + b1^2), 2*P*b1/sqrt(P^2 + b1^2), 0, 0;
    -(P^2 - b1^2)/sqrt(P^2 + b1^2), (a3*P^2 - 2*b2*P*b1 + a2*b1^2)/(P^2 + b1^2), (P*(a2*b1 - a3*b1) + 2*b1^2*b2)/(P^2 + b1^2) - b2, -P*b3/sqrt(P^2 + b1^2), 0;
    2*P*b1/sqrt(P^2 + b1^2), (P*(a2*b1 - a3*b1) + 2*b1^2*b2)/(P^2 + b1^2) - b2, (a2*P^2 + 2*b2*P*b1 + a3*b1^2)/(P^2 + b1^2), b1*b3/sqrt(P^2 + b1^2), 0;
    0, -P*b3/sqrt(P^2 + b1^2), b1*b3/sqrt(P^2 + b1^2), a4, b4;
    0, 0, 0, b4, a5
]
[1, 0, 0, 0, 0; 0, cos1, sin1, 0, 0; 0, -sin1, cos1, 0, 0; 0, 0, 0, 1, 0; 0, 0, 0, 0, 1]*[a1, b1, P, 0, 0; b1, a2, b2, 0, 0; P, b2, a3, b3, 0; 0, 0, b3, a4, b4; 0, 0, 0, b4, a5] → [
    a1, b1, P, 0, 0;
    P^2/sqrt(P^2 + b1^2) + b1^2/sqrt(P^2 + b1^2), P*b2/sqrt(P^2 + b1^2) + a2*b1/sqrt(P^2 + b1^2), P*a3/sqrt(P^2 + b1^2) + b1*b2/sqrt(P^2 + b1^2), P*b3/sqrt(P^2 + b1^2), 0;
    0, b1*b2/sqrt(P^2 + b1^2) - P*a2/sqrt(P^2 + b1^2), a3*b1/sqrt(P^2 + b1^2) - P*b2/sqrt(P^2 + b1^2), b1*b3/sqrt(P^2 + b1^2), 0;
    0, 0, b3, a4, b4;
    0, 0, 0, b4, a5
]
